f(x) := sqrt(|x|)*sin(π*x)
x_1 := -6
x_2 := 6
Δx := 0.1
x_LW := 100
y_LW := 200
x_HW := 1000
y_HW := 900
N := round((x_2 - x_1)/Δx)
N = 120
i := 0 .. N
x[i] := x_1 + i*Δx
y[i] := f(x[i])
z[i] := 1
x_H := max(x)
y_L := min(y)
x_L := min(x)
y_H := max(y)
x_L = -6
y_H = 2.34521
y_L = -2.34521
x_H = 6
M_S := stack(transpose(x), transpose(y), transpose(z))
Δx_W := x_HW - x_LW
Δy_W := y_HW - y_LW
Δx := x_H - x_L
Δy := y_H - y_L
M_S = [
    -6, -5.9, -5.8, -5.7, -5.6, -5.5, -5.4, -5.3, -5.2, -5.1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;
    0, 0.7506, 1.41557, 1.9315, 2.25061, 2.34521, 2.21006, 1.8625, 1.34036, 0.697859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;
    1, 1, 1, 1, 1, 1, 1, 1, 1, 1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]
Δx_W = 900
Δy_W = 700
Δx = 12
Δy = 4.69042
k_x := Δx_W/Δx
k_y := Δy_W/Δy
k_x = 75
k_y = 149.241
T_SW := [k_x, 0, x_LW - k_x*x_L; 0, -k_y, y_HW + k_y*y_L; 0, 0, 1]
M_W := T_SW*M_S
M_W = [
    100, 107.5, 115, 122.5, 130, 137.5, 145, 152.5, 160, 167.5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;
    550, 437.98, 338.739, 261.742, 214.118, 200, 220.17, 272.04, 349.965, 445.851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;
    1, 1, 1, 1, 1, 1, 1, 1, 1, 1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]
X_W := transpose(M_W)[:, 0]
Y_W := transpose(-M_W)[:, 1]
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