X1 := [2; 5]
Y1 := [12; 9]
X2 := [2; 5]
Y2 := [3; 6]
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x := 0
y := 0
Given
y + x - 14 == 0  # Уравнение прямой AB
y - x - 1 == 0  # Уравнение прямой CD
P := Find(x, y)  # Точка пересечения
X3 := [2; 5; 6.5]
Y3 := [12; 9; 7.5]
X4 := [2; 5; 6.5]
Y4 := [3; 6; 7.5]
P := transpose(P)
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# Углы наклона
TA := [1, 0, 6.5; 0, 1, 7.5; 0, 0, 1]*[cos(π), sin(π), 0; -sin(π), cos(π), 0; 0, 0, 1]*[1, 0, -6.5; 0, 1, -7.5; 0, 0, 1] = [-1, 0, 13; 0, -1, 15; 0, 0, 1]
fun(x) :=
    for i ∈ 0 .. 1
        N[i] ← TA*[X1[i]; Y1[i]; 1]
    return N
fun1(x) :=
    for i ∈ 0 .. 1
        N[i] ← TA*[X2[i]; Y2[i]; 1]
    return N
Z := fun(1) = [[11; 3; 1]; [8; 6; 1]]
D := fun1(1) = [[11; 12; 1]; [8; 9; 1]]
D[1] = [8; 9; 1]
Z[0] = [11; 3; 1]
D[0] = [11; 12; 1]
Z[1] = [8; 6; 1]
X3 := [11; 8]
Y3 := [3; 6]
X4 := [11; 8]
Y4 := [12; 9]
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